Mon 11/02/2009
08:48 AM
$PROBLEM ORAL ADMINISTRATION STUDY
$DATA run1.dta IGNORE=@
$INPUT ID TIME AMT DV EVID MDV BW AGE ISM RACE DOSE
$SUBROUTINE ADVAN2 TRANS2
$PK
  CL = THETA(1)*(BW/70)**THETA(4)*EXP(ETA(1))
  V = THETA(2)*(BW/70)**THETA(5)*EXP(ETA(2))
  KA = THETA(3)*EXP(ETA(3))
  S2 = V/1000

$ERROR
  IPRED = F
  W=SQRT(THETA(6)**2+THETA(7)**2*IPRED**2)
  IRES=DV-IPRED
  IWRES=IRES/W
  Y=IPRED+W*EPS(1)

$THETA  (0,2) ;CL
$THETA  (0,20) ;V
$THETA  (0,0.7) ;KA
$THETA  (0,5) ; CL-BW
$THETA (0,0.2) ;V-BW
$THETA  (0,5) ; Add
$THETA (0,0.2) ;Prop

$OMEGA  0.1 ;CL
$OMEGA  0.1 ;V
$OMEGA  0.1 ;KA

$SIGMA  1 FIX

$ESTIMATION METH=1 INTER MAXEVAL=9999 PRINT=5
$COVARIANCE

$TABLE ID TIME AMT IPRED IWRES NOPRINT ONEHEADER FILE=sdtab1
$TABLE ID CL V KA ETA1 ETA2 NOPRINT NOAPPEND ONEHEADER FILE=patab1
$TABLE ID BW AGE NOPRINT NOAPPEND ONEHEADER FILE=cotab1
$TABLE ID ISM RACE NOPRINT NOAPPEND ONEHEADER FILE=catab1

NM-TRAN MESSAGES
 WARNINGS AND ERRORS (IF ANY) FOR PROBLEM    1
 (WARNING  2) NM-TRAN INFERS THAT THE DATA ARE POPULATION.

1NONLINEAR MIXED EFFECTS MODEL PROGRAM (NONMEM)    DOUBLE PRECISION NONMEM    VERSION VI LEVEL 2.0
 DEVELOPED AND PROGRAMMED BY STUART BEAL AND LEWIS SHEINER
 PROBLEM NO.:         1
 ORAL ADMINISTRATION STUDY
 TOT. NO. OF OBS RECS:      691
 TOT. NO. OF INDIVIDUALS:    100
 ONE COMPARTMENT MODEL WITH FIRST-ORDER ABSORPTION (ADVAN2)
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
0MINIMIZATION SUCCESSFUL
 NO. OF FUNCTION EVALUATIONS USED:      340
 NO. OF SIG. DIGITS IN FINAL EST.:  3.2

 ETABAR IS THE ARITHMETIC MEAN OF THE ETA-ESTIMATES,
 AND THE P-VALUE IS GIVEN FOR THE NULL HYPOTHESIS THAT THE TRUE MEAN IS 0.

 ETABAR:   0.32E-03 -0.92E-02 -0.97E-02
 SE:       0.26E-01  0.24E-01  0.22E-01

 P VAL.:   0.99E+00  0.70E+00  0.67E+00

 ********************                           MINIMUM VALUE OF OBJECTIVE FUNCTION                  ********************

 **************************************************       8222.367     **************************************************

 ********************                                  FINAL PARAMETER ESTIMATE                      ********************

 THETA - VECTOR OF FIXED EFFECTS PARAMETERS   *********
            TH 1      TH 2      TH 3      TH 4      TH 5      TH 6      TH 7
         1.95E+00  1.95E+01  6.94E-01  7.68E-01  7.06E-01  1.05E+02  9.41E-02

 OMEGA - COV MATRIX FOR RANDOM EFFECTS - ETAS  ********
            ETA1      ETA2      ETA3
 ETA1
+        7.45E-02
 ETA2
+        0.00E+00  6.94E-02
 ETA3
+        0.00E+00  0.00E+00  8.76E-02

 SIGMA - COV MATRIX FOR RANDOM EFFECTS - EPSILONS  ****
            EPS1
 EPS1
+        1.00E+00

 ********************                             STANDARD ERROR OF ESTIMATE                         ********************

 THETA - VECTOR OF FIXED EFFECTS PARAMETERS   *********
            TH 1      TH 2      TH 3      TH 4      TH 5      TH 6      TH 7
         5.61E-02  5.96E-01  2.78E-02  1.68E-01  1.16E-01  7.88E+00  8.46E-03

 OMEGA - COV MATRIX FOR RANDOM EFFECTS - ETAS  ********
            ETA1      ETA2      ETA3
 ETA1
+        1.05E-02
 ETA2
+       .........  1.06E-02
 ETA3
+       ......... .........  2.64E-02

 SIGMA - COV MATRIX FOR RANDOM EFFECTS - EPSILONS  ****
            EPS1
 EPS1
+       .........

 ********************                          COVARIANCE MATRIX OF ESTIMATE                         ********************

            TH 1      TH 2      TH 3      TH 4      TH 5      TH 6      TH 7      OM11      OM12      OM13      OM22      OM23
             OM33      SG11
 TH 1
+        3.15E-03
 TH 2
+       -2.55E-03  3.55E-01
 TH 3
+       -1.24E-05  4.07E-03  7.73E-04
 TH 4
+        1.29E-03 -7.79E-04  7.04E-05  2.83E-02
 TH 5
+       -2.01E-05  1.61E-02 -5.36E-05 -3.18E-03  1.34E-02
 TH 6
+        1.31E-02  2.03E-01  5.33E-03  4.29E-02 -7.93E-02  6.20E+01
 TH 7
+       -3.63E-05 -1.56E-04 -1.72E-05 -4.76E-05  3.44E-05 -4.47E-02  7.16E-05
 OM11
+       -2.11E-05 -9.88E-04 -1.47E-05 -5.75E-04 -6.43E-05 -9.58E-03  7.24E-06  1.11E-04
 OM12
+       ......... ......... ......... ......... ......... ......... ......... ......... .........
 OM13
+       ......... ......... ......... ......... ......... ......... ......... ......... ......... .........
 OM22
+        1.98E-05 -3.89E-04 -4.30E-06  1.23E-05  1.16E-05 -6.88E-03 -1.90E-06 -6.70E-06 ......... .........  1.12E-04
 OM23
+       ......... ......... ......... ......... ......... ......... ......... ......... ......... ......... ......... .........
 OM33
+        1.71E-04 -3.91E-04  1.43E-04  4.76E-04 -4.57E-04  4.84E-02 -8.90E-05 -5.88E-07 ......... ......... -3.76E-06 .........
          6.95E-04
 SG11
+       ......... ......... ......... ......... ......... ......... ......... ......... ......... ......... ......... .........
         ......... .........

 ********************                         CORRELATION MATRIX OF ESTIMATE                         ********************

            TH 1      TH 2      TH 3      TH 4      TH 5      TH 6      TH 7      OM11      OM12      OM13      OM22      OM23
             OM33      SG11
 TH 1
+        1.00E+00
 TH 2
+       -7.61E-02  1.00E+00
 TH 3
+       -7.93E-03  2.46E-01  1.00E+00
 TH 4
+        1.36E-01 -7.76E-03  1.50E-02  1.00E+00
 TH 5
+       -3.09E-03  2.33E-01 -1.67E-02 -1.63E-01  1.00E+00
 TH 6
+        2.96E-02  4.33E-02  2.43E-02  3.24E-02 -8.69E-02  1.00E+00
 TH 7
+       -7.65E-02 -3.09E-02 -7.31E-02 -3.34E-02  3.51E-02 -6.71E-01  1.00E+00
 OM11
+       -3.56E-02 -1.57E-01 -5.01E-02 -3.24E-01 -5.27E-02 -1.15E-01  8.12E-02  1.00E+00
 OM12
+       ......... ......... ......... ......... ......... ......... ......... ......... .........
 OM13
+       ......... ......... ......... ......... ......... ......... ......... ......... ......... .........
 OM22
+        3.34E-02 -6.18E-02 -1.46E-02  6.92E-03  9.48E-03 -8.27E-02 -2.13E-02 -6.02E-02 ......... .........  1.00E+00
 OM23
+       ......... ......... ......... ......... ......... ......... ......... ......... ......... ......... ......... .........
 OM33
+        1.16E-01 -2.49E-02  1.96E-01  1.07E-01 -1.50E-01  2.33E-01 -3.99E-01 -2.12E-03 ......... ......... -1.35E-02 .........
          1.00E+00
 SG11
+       ......... ......... ......... ......... ......... ......... ......... ......... ......... ......... ......... .........
         ......... .........
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